L_1 := 5 mH
f := 50 Hz
V_dc := 100 V
ω := 2*π*f = 314.159 1/s
R_1 := 8 Ω
X_L := 2*π*f*L_1 = 1.5708 Ω
Z := sqrt(R_1^2 + (ω*L_1)^2) = 8.15275 Ω
I := V_dc/Z = 12.2658 A
Φ_1 := atan(X_L/R_1) = 0.193883
P_f := cos(Φ_1) = 0.981263
P := I^2*R_1 = 1.2036 kW
S_1 := V_dc^2/Z = 1.22658 kW
P_f2 := P/S_1 = 0.981263
